# SPIN 1-turn Matrix
# [component: outputs SPI_SEQ]
j_1 := 1
j_2 := j_1 + 32
rows(SPI_SEQ) = 2242
cols(SPI_SEQ) = 6
i := 0 .. rows(SPI_SEQ) - 1
j := j_1, j_2 .. 10401
SSEQ_iter[i] := SPI_SEQ[i, 0]
SSEQ_eid[i] := SPI_SEQ[i, 1]
SSEQ_ray[i] := SPI_SEQ[i, 2]
SSEQ_SX[i] := SPI_SEQ[i, 3]
SSEQ_SY[i] := SPI_SEQ[i, 4]
SSEQ_SZ[i] := SPI_SEQ[i, 5]
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# Orbital 1-turn Matrix
# [component: outputs RAY_SEQ]
rows(RAY_SEQ) = 2271
cols(RAY_SEQ) = 9
i := 0 .. rows(RAY_SEQ) - 1
RSEQ_iter[i] := RAY_SEQ[i, 0]
RSEQ_eid[i] := RAY_SEQ[i, 1]
RSEQ_ray[i] := RAY_SEQ[i, 2]
RSEQ_X[i] := RAY_SEQ[i, 3]
RSEQ_A[i] := RAY_SEQ[i, 4]
RSEQ_Y[i] := RAY_SEQ[i, 5]
RSEQ_B[i] := RAY_SEQ[i, 6]
RSEQ_T[i] := RAY_SEQ[i, 7]
RSEQ_D[i] := RAY_SEQ[i, 8]
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